# Лаборатораная работа № 1  Селуянов 932102
TOL := 0.000000001
# [area: Задание 1]
1.
tan(π/4 + 1) - cos(π/8) = -5.51192
2.
sqrt(1 + ln(1 + sin(π/4))) - 1 = 0.23887
# [area: Задание 2]
1.
f(x) := 2*sqrt(x^2 + 2*x - 2.75) - x - 3
f(5) = 3.35782
a := -2.7
b := 3
rc := root(f(a), a)
rb := root(f(b), b)
rc = -2.93675
rb = 2.27008
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f(rc) = -9.76996e-15
f(rb) = 0
2.
f(x) := sqrt(3*x + 1) + sqrt(9 - x) - (6/sqrt(9 - x))
f(5) = 3
a := 7
b := 5
ra := root(f(a), a)
rb := root(f(b), b)
ra = 8
rb = 8
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f(ra) = 0
f(rb) = 0
3.
f(x) := e^(-x^2) + e^(2*x) - 4
f(5) = 22022.5
a := 7
b := 5
ra := root(f(a), a)
rb := root(f(b), b)
ra = 0.596923
rb = 0.596923
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f(ra) = 0
f(rb) = 0
4.
f(x) := log(log(x)) + log(log(x^3) - 2, 10)
f(5) = -1.16917
a := 5
b := 15
ra := root(f(a), a)
rb := root(f(b), b)
ra = 10
rb = 10
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f(ra) = 0
f(rb) = -4.82164e-17
5.
f(x) := nthroot((x + 1)/(x - 1), 3) + nthroot(2*x/(x^2 + 1), 3) - 1
f(5) = 0.871951
a := -100
b := 100
ra := root(f(a), a)  # error: Это вычисление не приближается к решению.
rb := root(f(b), b)  # error: Это вычисление не приближается к решению.
ra =  # error: Эта переменная не определена.
rb =  # error
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# [area: Задание 3]
1.
f(x) := 0.2*x^5 - 4*x^3 + 12*x^2 - 9
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V := [-9; 0; 12; -4; 0; 0.2]
R := polyroots(V)
f(R) = [6.12772e-11; -3.09797e-12; -3.09797e-12; 1.9277e-11 - 1.31166e-11i; -1.61151e-11 + 2.24247e-11i]
R = [-5.53023; -0.774468; 1.061; 2.62185 - 1.74027i; 2.62185 + 1.74027i]
2.
f(x) := -6*x^4 + 18*x^2 - 3*x + 6
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V := [6; -3; 18; 0; -6]
R := polyroots(V)
f(R) = [1.04627e-12; 1.11022e-12 + 2.98428e-13i; -1.59872e-14 - 3.55271e-15i; 6.39488e-14]
R = [-1.88345; 0.0696491 - 0.547323i; 0.0696491 + 0.547323i; 1.74415]
# [area: Задание 4]
1.
x := 100
y := 100
Given
y^2 - x - 3*log(x) == 0
5*x + x*y - 2*x^2 == 1
[a; b] := Find(x, y)
Резульат
a = 3.48744
b = 2.26163
Проверка
b^2 - a - 3*log(a) = 6.66134e-16
5*a + a*b - 2*a^2 = 1
2.
x := 1
y := 1
Given
sqrt(2*x - y + 11) - sqrt(3*x + y - 9) == 3
nthroot(2*x - y + 11, 4) + nthroot(3*x + y - 9, 4) == 3
[a; b] := Find(x, y)
Результат
a = 3
b = 1
Проверка
sqrt(2*a - b + 11) - sqrt(3*a + b - 9) = 3
nthroot(2*a - b + 11, 4) + nthroot(3*a + b - 9, 4) = 3
