# Лабораторная работа № 2
# Выполнил: Селуянов Данила 932102
# Тема: Применение производных  и односторонних пределов к исследованию функций. Разложение функции в ряд.
# [area: Задание 1]
1.
1.
f(x) := -e^(x^2/3) - x/2
g(x) := d/dx(f(x)) → -2/3*x*e^(1/3*x^2) - 1/2
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2.
# 3. | Стационарные точки:
a := -5
crit1 := root(g(a), a)
crit1 = -0.651151
b := 8
crit2 := root(g(b), b)
crit2 = -0.651151
# 4. | Определим вид экстремума
g(x) → -2/3*x*e^(1/3*x^2) - 1/2
z(x) := d/dx(g(x)) → -2/3*e^(1/3*x^2) - 4/9*x^2*e^(1/3*x^2)
z(crit1) = -0.984922
# Так как вторая производная от crit1 равна отрицательному числу =>
# это максимум. Убедитесь в этом посмотрев на график
2.
1.
f2(x2) := 0.5*x2^5 - 2*x2^4 + 3*x2^3 - 7*x2 + 8
g2(x2) := d/dx2(f2(x2)) → 2.5*x2^4 - 8*x2^3 + 9*x2^2 - 7
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2.
# 3. | Стационарные точки:
v2 := g2(x2) coeffs, x2 → [-7; 0; 9; -8; 2.5]
r2 := polyroots(v2)
r2 = [-0.671931; 1.11617 - 1.13829i; 1.11617 + 1.13829i; 1.63959]
4.
# Определим вид экстремума
g2(x2) → 2.5*x2^4 - 8*x2^3 + 9*x2^2 - 7
z2(x2) := d/dx2(g2(x2)) → 10.0*x2^3 - 24*x2^2 + 18*x2
z2(r2[0]) = -25.9643
z2(r2[3]) = 9.07086
# Так как вторая производная от r2[0] отрицательна => это максимум.
# Так как вторая производная от r2[3] положительна => это минимум.
# Убедитесь в этом посмотрев на графике.
3.
1.
f3(x3) := x3^3/3*e^(-x3^2)
g3(x3) := d/dx3(f3(x3)) → x3^2*e^(-x3^2) - 2/3*x3^4*e^(-x3^2)
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2.
# 3. | Стационарные точки:
a := -1.5
crit1 := root(g3(a), a)
crit1 = -1.22474
c := 0
crit3 := root(g3(c), c)
crit3 = 0
b := 1
crit2 := root(g3(b), b)
crit2 = 1.22474
# 4. | Определим вид экстремума
g3(x3) → x3^2*e^(-x3^2) - 2/3*x3^4*e^(-x3^2)
z3(x3) := d/dx3(g3(x3)) → 2*x3*e^(-x3^2) - 14/3*x3^3*e^(-x3^2) + 4/3*x3^5*e^(-x3^2)
u3(x3) := d/dx3(z3(x3)) → 2*e^(-x3^2) - 18*x3^2*e^(-x3^2) + 16*x3^4*e^(-x3^2) - 8/3*x3^6*e^(-x3^2)
z3(crit1) = 0.546555
# Так как вторая производная от crit2 отрицательна => это максимум.
# Так как вторая производная от crit1 положительна => это минимум.
# Убедитесь в этом посмотрев на графике.
u3(crit3) = 2
z3(crit2) = -0.546555
# Т.к 3я производная не равна нулю в критической точке crit3 =>
# это точка перегиба
z3(crit3) = 0
4.
1.
f4(x4) := nthroot(x4^2/(1 + x4^4), 3)
g4(x4) := d/dx4(f4(x4)) → 1/(3*(x4^2/(1 + x4^4))^(2/3))*(2*x4/(1 + x4^4) - 4*x4^5/(1 + x4^4)^2)
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2.
# 3. | Стационарные точки:
a := -1
crit1 := root(g4(a), a)
crit1 = -1
c := 0
crit4 := root(g4(c), c)  # error: divide by zero  # division by zero
b := 1
crit4 =  # error: bad_variable
crit2 := root(g4(b), b)
crit2 = 1
# 4. | Определим вид экстремума
g4(x4) → 1/(3*(x4^2/(1 + x4^4))^(2/3))*(2*x4/(1 + x4^4) - 4*x4^5/(1 + x4^4)^2)
z4(x4) := d/dx4(g4(x4)) → -2/(9*(x4^2/(1 + x4^4))^(5/3))*(2*x4/(1 + x4^4) - 4*x4^5/(1 + x4^4)^2)^2 + 1/(3*(x4^2/(1 + x4^4))^(2/3))*(2/(1 + x4^4) - 28*x4^4/(1 + x4^4)^2 + 32*x4^8/(1 + x4^4)^3)
z4(crit1) = -1.05827
limit(g4(x4), x4 → 0+) → ∞
limit(g4(x4), x4 → 0-) → -∞
z4(crit2) = -1.05827
1.
y(x) := x/(x - 1)
x/(x - 1) series, x == 2, 3 → 2 - 1*(x - 2) + 1*(x - 2)^2
z(x) := 2 - 1*(x - 2) + 1*(x - 2)^2
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2.
y(x) := asin(x)
asin(x) series, x == 0, 3 → 1*x
z(x) := 1*x
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3.
y(x) := 1/sqrt(x)
1/sqrt(x) series, x == 1, 3 → 1 - 1/2*(x - 1) + 3/8*(x - 1)^2 + O((x - 1)^3)
z(x) := 1 - 1/2*(x - 1) + 3/8*(x - 1)^2
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