# Лабаратораня работа № 3
# Тема: Алгебра векторов и матриц. Интерполяционная формула Лагранжа. Сплайны
# Выполнил: Селуянов Данила 932102
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# [area: Задание 1]
# 1. Вычислите выражение
A := [1, 1, 0; 2, -2, 3; 4, 1, 3]
B := [1, 0, 0; 0, 1, 0; 0, 0, 1]
C := [-1, 3, 2; 1, 0, 4; 5, 7, 1]
D := A + (B + C)^-1*C
D = [2.44828, 0.862069, -0.172414; 1.68966, -0.827586, 2.96552; 3.96552, 0.741379, 4.05172]
# 2. Решить систему линейных уравнений
# Решение через Given:
x1 := 0
x2 := 0
x3 := 0
Given
2*x1 - 2*x2 + x3 == 4
-x1 - x2 + 7*x3 == 16
x1 - 4*x2 + 2*x3 == -3
Solves1 := Find(x1, x2, x3)
Solves1 = [3.66667; 3.30769; 3.28205]
# Решение через Isolve:
A := [2, -2, 1; -1, -1, 7; 1, -4, 2]
b := [4; 16; -3]
Solves2 := lsolve(A, b)
Solves2 = [3.66667; 3.30769; 3.28205]
# Решение через обратную матрицу:
X := A^-1*b
X = [3.66667; 3.30769; 3.28205]
# Решение методом Крамера
A = [2, -2, 1; -1, -1, 7; 1, -4, 2]
|A| = 39
det([4, -2, 1; 16, -1, 7; -3, -4, 2]) = 143
det([2, 4, 1; -1, 16, 7; 1, -3, 2]) = 129
[143/39; 129/39; 128/39] = [3.66667; 3.30769; 3.28205]
det([2, -2, 4; -1, -1, 16; 1, -4, -3]) = 128
# 3. Найдите и выполните  всевозможные варианты попарного умножения матриц
V := [0; 2; 1]
W := [3, 2, 1]
A := [5, 8; 3, 4; 0, 0; 6, 1; 5, 8]
B := [4, 2, 9, 1, 3; 2.6, 1.9, 0.4, 8, 3.7; 15, 6, 2.6, 5, 0]
# 3x1 | 1x3 | 5x2 | 3x5
# V:
V*W = [0, 0, 0; 6, 4, 2; 3, 2, 1]
transpose(V)*B = [20.2, 9.8, 3.4, 21, 7.4]
transpose(V)*transpose(W) = 5
# W:
W*B = [32.2, 15.8, 30.4, 24, 16.4]
transpose(W)*transpose(V) = [0, 6, 3; 0, 4, 2; 0, 2, 1]
W*V = 5
# A:
transpose(A)*transpose(B) = [47, 85.2, 123; 65, 66, 149]
# B:
B*A = [47, 65; 85.2, 66; 123, 149]
transpose(B)*transpose(W) = [32.2; 15.8; 30.4; 24; 16.4]
transpose(B)*V = [20.2; 9.8; 3.4; 21; 7.4]
# [area: Задание 2]
1.
f(x) := x^3/3*e^(-x^2)
z := -3, -2.5 .. 3
z = [-3; -2.5; -2; -1.5; -1; -0.5; 0; 0.5; 1; 1.5; 2; 2.5; 3]
f(z) = [-0.00111069; -0.0100544; -0.0488417; -0.118574; -0.122626; -0.03245; 0; 0.03245; 0.122626; 0.118574; 0.0488417; 0.0100544; 0.00111069]
M := [
    -3, f(-3);
    -2.5, f(-2.5);
    -2, f(-2);
    -1.5, f(-1.5);
    -1, f(-1);
    -0.5, f(-0.5);
    0, f(0);
    0.5, f(0.5);
    1, f(1);
    1.5, f(1.5);
    2, f(2);
    2.5, f(2.5);
    3, f(3)
] = [
    -3, -0.00111069;
    -2.5, -0.0100544;
    -2, -0.0488417;
    -1.5, -0.118574;
    -1, -0.122626;
    -0.5, -0.03245;
    0, 0;
    0.5, 0.03245;
    1, 0.122626;
    1.5, 0.118574;
    2, 0.0488417;
    2.5, 0.0100544;
    3, 0.00111069
]
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2.
f(x) := sin(x^2)
z := -5, -4.8 .. 5
z = [
    -5; -4.8; -4.6; -4.4; -4.2; -4; -3.8; -3.6; -3.4; -3.2
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]
f(z) = [
    -0.132352; -0.866851; 0.738706; 0.488565; -0.935459; -0.287903; 0.954495; 0.383543; -0.844896; -0.727878
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]
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# [area: Задание 3]
# 1. Построить таблично заданную функцию
N := 1
i := 0 .. N = [0; 1]
z := -4, -4 + 1 .. 4
f(x) := 1/(1 + x^2)
z = [-4; -3; -2; -1; 0; 1; 2; 3; 4]
f(z) = [0.0588235; 0.1; 0.2; 0.5; 1; 0.5; 0.2; 0.1; 0.0588235]
# 2. Построить интерполяционный полином Лагранжа
L(z) := sum(f(z)[i]*product((z - z[j])/(z[i] - z[j]), j = 0 .. N), i = 0 .. 1)
