# Лабораторная работа № 4
# Тема: Задачи интегрирования. Трехмерные поверхности
# Выполнил: Селуянов Данила 932102
# [area: Задание 1]
# 1. Найти первообразные следующих функций
# a)
integral(1/cos(4*x)^2, x) → tan(4*x)/4
# c)
integral(sin(x/2)^2, x) → x/2 - sin(x)/2
# b)
integral(1/nthroot(5^x, 3), x) → -3/(5^(x/3)*ln(5))
# d)
integral(1/(x^2 + 4), x) → atan(x/2)/2
# 2. Вычислить значения определенных интегралов
# a)
integral(x^3, x = -2 .. 2) = 0
# c)
integral(nthroot(x - 1, 3), x = 2 .. 9) = 11.25
# d)
integral(1/cos(x)^2, x = -π/4 .. 0) = 1
# b)
integral((2 + 5*nthroot(x, 3))/x^3, x = 1 .. 8) = 3.89063
# 3. Найти среднее значение функции на заданных отрезках
sr_znach(a, b, f) := integral(f(x), x = a .. b)/(b - a)  # по теореме о среднем
# a)
f1(x) := x^2  # на [-1;1]
# b)
f2(x) := sin(x)  # на [0;π]
# c)
f3(x) := 1/(1 + x^2)  # на [-3;5]
sr_znach(-1, 1, f1) = 0.333333
sr_znach(0, π, f2) = 0.63662
sr_znach(-3, 5, f3) = 0.327806
# 4. Найти площадь фигуры, , лежащей в правой полуплоскости и ограниченной дугой окружности
# x^2 + y^2 = 8 и параболой y^2 = 2x
f1(x) := sqrt(8 - x^2)
f2(x) := sqrt(2*x)
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x1 := 0
y1 := 0
Given
x1^2 + y1^2 == 8
y1^2 == 2*x1
Find(x1, y1) = [2; 2]  # это точка пересечения
# Найдем площадь:
S := 2*(integral(sqrt(2*x), x = 0 .. 2) + integral(sqrt(8 - x^2), x = 2 .. sqrt(8)))
S = 7.61653
# 5. Вычислить длину кривой, заданной функцией f(x) на отрезке [a, b]
L(y, a, b) := integral(sqrt(1 + (d/dx(y))^2), x = a .. b)  # формула длины кривой
# a)
f(x) := x^2  # на [0;4]
integral(sqrt(1 + (d/dx(x^2))^2), x = 0 .. 4) = 16.8186
# b)
f(x) := sin(x)  # на [0;2π]
integral(sqrt(1 + (d/dx(sin(x)))^2), x = 0 .. 2*π) = 7.6404
# c)
f(x) := tan(x)  # на [-1.5;1.5]
integral(sqrt(1 + (d/dx(tan(x)))^2), x = -1.5 .. 1.5) = 28.8976
# [area: Задание 2]
# 1. Постройте трехмерные поверхности
# а)
f1(α, β) := [10*sin(α)*cos(β); 10*sin(α)*sin(β); 10*cos(α)]  # сфера r = 10
fig1 := CreateMesh(f1, 0, π, 0, 2*π, 18, 36)
# [component: inputs fig1]
# b)
a := 4
b := 2
c := 10
f2(α, β) := [a*sin(α)*cos(β); b*sin(α)*sin(β); c*cos(α)]  # Эллипсоид с полуосями 4, 2, 10
fig2 := CreateMesh(f2, 0, π, 0, 2*π, 18, 36)
# [component: inputs fig2]
# 2. Продемонстрировать разные варианты раскраски и штриховки Сферы и Эллипсоида
# [component: inputs fig1]
# [component: inputs fig2]
# [component: inputs fig1]
# [component: inputs fig2]
F1 := CreateMesh(f1, 0, π/2, 0, 2*π, 18, 36)
F2 := CreateMesh(f1, 0, π, 0, π, 18, 36)
F3 := CreateMesh(f1, 0, 3/2*π, 0, 3/2*π, 18, 36)
# [component: inputs F1, F2]
# [component: inputs F2]
# [component: inputs F3]
# 3. Используя интегрирование, найти объем тела вращения
i := 1, 1.2 .. 8
f(i) := 2/i
# тело образовано вращением вокруг оси абсцисс фигуры, ограниченной гиперболой y = 2/x и прямыми x = 1, x = 8
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V := π*integral((2/x)^2, x = 1 .. 8) → 7*π/2
f(x) := sqrt(1 - x^2) + 2
f1(x) := -sqrt(1 - x^2) + 2
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V := π*integral(f(x)^2, x = -1 .. 1) - π*integral(f1(x)^2, x = -1 .. 1) = 39.4785
