# Task 1
# [area: 1)]
f(x) := -e^(x^2/3) - x/2
g(x) := d/dx(f(x)) → -2*x*e^(x^2/3)/3 - 1/2
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a := 0
root(g(a), a) = -0.651151
f(x) := -2*x*e^(x^2/3)/3 - 1/2
g(x) := d/dx(f(x)) → -2*e^(x^2/3)/3 - 4*x^2*e^(x^2/3)/9
x := -0.651
g(x) = -0.984757
f(u) := 0.5*u^5 - 2*u^4 + 3*u^3 - 7*u + 8
g(u) := d/du(f(u)) → 9*u^2 - 8*u^3 + 2.5*u^4 - 7
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9*u^2 - 8*u^3 + 2.5*u^4 - 7 == 0
b := 1
[-0.671930993416; 1.63959025672; 1.11617036835 - 1.13829259248i; 1.11617036835 + 1.13829259248i]
a := -1
root(g(b), b) = 1.63959
root(g(a), a) = -0.671931
f(u) := 9*u^2 - 8*u^3 + 2.5*u^4 - 7
g(u) := d/du(f(u)) → 18*u - 24*u^2 + 10.0*u^3
d := 1.11617036835 + 1.13829259248i
c := 1.11617036835 - 1.13829259248i
a := -0.672
b := 1.64
g(d) = -8.1933 - 12.7013i
g(c) = -8.1933 + 12.7013i
g(b) = 9.07904
g(a) = -25.9687
f(n) := e^(-n^2)*n^3/3
g(n) := d/dn(f(n)) → n^2*e^(-n^2) - 2*n^4*e^(-n^2)/3
n^2*e^(-n^2) - 2*n^4*e^(-n^2)/3 == 0
[0; sqrt(6)/2; -sqrt(6)/2]
f(n) := n^2*e^(-n^2) - 2*n^4*e^(-n^2)/3
g(n) := d/dn(f(n)) → 4*n^5*e^(-n^2)/3 - 14*n^3*e^(-n^2)/3 + 2*n*e^(-n^2)
c := -sqrt(6)/2
a := 0
b := sqrt(6)/2
g(b) = -0.546555
g(c) = 0.546555
g(a) = 0
q(r) := nthroot(r^2/(1 + r^4), 3)
g(r) := d/dr(q(r))  # error: Эта переменная не определена.
# NOT WORKIN :(
# Task 2
-y + (x - 2)/(x - 3)
-y + 2/3 - x/9 - x^2/27
