# [area: task 1.1]
1
A := [1, 1, 0; 2, -2, 3; 4, 1, 3]
B := [1, 0, 0; 0, 1, 0; 0, 0, 1]
C := [-1, 3, 2; 1, 0, 4; 5, 7, 1]
D := A + (B + C)^-1*C
D = [2.44828, 0.862069, -0.172414; 1.68966, -0.827586, 2.96552; 3.96552, 0.741379, 4.05172]
# [area: task 1.2]
x1 := 0
x2 := 0
x3 := 0
Given
2*x1 - 2*x2 + x3 == 4
-x1 - x2 + 7*x3 == 16
x1 - 4*x2 + 2*x3 == -3
Solves1 := Find(x1, x2, x3)
Solves1 = [3.66667; 3.30769; 3.28205]
A := [2, -2, 1; -1, -1, 7; 1, -4, 2]
b := [4; 16; -3]  # obratnaya matrix
q := A^-1*b
Solves2 := lsolve(A, b)
q = [3.66667; 3.30769; 3.28205]
Solves2 = [3.66667; 3.30769; 3.28205]
krammer
det([2, -2, 1; -1, -1, 7; 1, -4, 2]) = 39
det([4, -2, 1; 16, -1, 7; -3, -4, 2]) = 143
det([2, 4, 1; -1, 16, 7; 1, -3, 2]) = 129
det([2, -2, 4; -1, -1, 16; 1, -4, -3]) = 128
143/39 = 3.66667
129/39 = 3.30769
128/39 = 3.28205
# [area: task 1.3]
# 3
V := [0; 2; 1]
W := [3, 2, 1]
A := [5, 8; 3, 4; 0, 0; 6, 1; 5, 8]
B := [4, 2, 9, 1, 3; 2.6, 1.9, 0.4, 8, 3.7; 15, 6, 2.6, 5, 0]
# 3x1 | 1x3 | 5x2 | 3x5
# V:
V*W = [0, 0, 0; 6, 4, 2; 3, 2, 1]
transpose(V)*B = [20.2, 9.8, 3.4, 21, 7.4]
transpose(V)*transpose(W) = 5
# W:
W*B = [32.2, 15.8, 30.4, 24, 16.4]
transpose(W)*transpose(V) = [0, 6, 3; 0, 4, 2; 0, 2, 1]
W*V = 5
# A:
transpose(A)*transpose(B) = [47, 85.2, 123; 65, 66, 149]
# B:
B*A = [47, 65; 85.2, 66; 123, 149]
transpose(B)*transpose(W) = [32.2; 15.8; 30.4; 24; 16.4]
transpose(B)*V = [20.2; 9.8; 3.4; 21; 7.4]
# [area: task 2.1]
f(x) := e^(-x^2)*x^3/3
begin := -3
end := 3
step := 0.5
step1 := 0 .. |(end - begin)/step|
S[step1, 0] := begin + step1*step
S[step1, 1] := f(S[step1, 0])
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S = [
    -3, -0.00111069;
    -2.5, -0.0100544;
    -2, -0.0488417;
    -1.5, -0.118574;
    -1, -0.122626;
    -0.5, -0.03245;
    0, 0;
    0.5, 0.03245;
    1, 0.122626;
    1.5, 0.118574;
    2, 0.0488417;
    2.5, 0.0100544;
    3, 0.00111069
]
# [area: task 2.2]
f1(x) := sin(x^2)
begin := -5
end := 5
step := 0.2
step1 := 0 .. |(end - begin)/step|
S[step1, 0] := begin + step1*step
S[step1, 1] := f1(S[step1, 0])
S = [
    -5, -0.132352;
    -4.8, -0.866851;
    -4.6, 0.738706;
    -4.4, 0.488565;
    -4.2, -0.935459;
    -4, -0.287903;
    -3.8, 0.954495;
    -3.6, 0.383543;
    -3.4, -0.844896;
    -3.2, -0.727878
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]
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f(x) := 1/(1 + x^2)
i := 0, 1 .. 8
S[i, 0] := -4 + i*1
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S[i, 1] := f(S[i, 0])
S := [-4, 0.059; -3, 0.1; -2, 0.2; -1, 0.5; 0, 1; 1, 0.5; 2, 0.2; 3, 0.1; 4, 0.059]
X := S[:, 0]
Y := S[:, 1]
i := 0, 1 .. 8
P(x, X, Y) := sum(Y[i]*product({
    (x - X[j])/(X[i] - X[j]) if i ≠ j
    1 if i == j
}, j = 0 .. 8), i = 0 .. 8)
S1[i, 0] := -4 + i*1
S1[i, 1] := P(S[i, 0], X, Y)
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S1 = [-4, 0.059; -3, 0.1; -2, 0.2; -1, 0.5; 0, 1; 1, 0.5; 2, 0.2; 3, 0.1; 4, 0.059]
s := lspline(X, Y)
I(z) := interp(s, X, Y, z)
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